*HEADING
SimOps Thermal Analysis: Cylinder_MedFi_Robust.msh
*NODE
1, 25.000000, 0.000000, 50.000000
2, 25.000000, 0.000000, 0.000000
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*ELEMENT, TYPE=C3D4, ELSET=Eall
3225, 5331, 6209, 6024, 7523
3226, 4782, 6076, 5409, 6957
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*MATERIAL, NAME=ALUMINUM
*CONDUCTIVITY
150.0
*SOLID SECTION, ELSET=Eall, MATERIAL=ALUMINUM
*STEP
*HEAT TRANSFER, STEADY STATE
*BOUNDARY
1, 11, 11, 800.0
3, 11, 11, 800.0
5, 11, 11, 800.0
6, 11, 11, 800.0
7, 11, 11, 800.0
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10513, 11, 11, 300.0
*NODE FILE
NT
*END STEP
