*HEADING
SimOps Thermal Analysis: mesh.msh
*NODE
1, 0.000000, 0.000000, 0.000000
2, 0.000000, 0.000000, 0.050000
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*ELEMENT, TYPE=C3D4, ELSET=E_Vol
1365, 279, 943, 731, 776
1366, 718, 538, 698, 778
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*ELEMENT, TYPE=S3, ELSET=E_Skin
1, 1, 9, 255
2, 33, 1, 255
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*MATERIAL, NAME=Mat1
*CONDUCTIVITY
0.15
*DENSITY
2.7e-06
*SPECIFIC HEAT
900.0
*SOLID SECTION, ELSET=E_Vol, MATERIAL=Mat1
*SHELL SECTION, ELSET=E_Skin, MATERIAL=Mat1
1.0
*NSET, NSET=N_All
1, 2, 3, 4, 5, 6
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*INITIAL CONDITIONS, TYPE=TEMPERATURE
N_All, 300.0
*STEP
*HEAT TRANSFER, STEADY STATE
*BOUNDARY
*ELSET, ELSET=E_FluxSelect
1267,
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*SURFACE, NAME=S_Flux, TYPE=ELEMENT
E_FluxSelect, S1
*DFLUX
S_Flux, S, 0.049999999999999996
*NODE PRINT, NSET=N_All, FREQUENCY=1
NT
*END STEP
