*HEADING
SimOps Thermal Analysis: mesh.msh
*NODE
1, 0.000000, 0.000000, 0.000000
2, 0.000000, 0.000000, 0.100000
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*ELEMENT, TYPE=C3D4, ELSET=E_Vol
2573, 1605, 1618, 1429, 1380
2574, 1713, 1800, 1364, 1424
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*ELEMENT, TYPE=S3, ELSET=E_Skin
1, 1, 9, 477
2, 58, 1, 477
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*MATERIAL, NAME=Mat1
*CONDUCTIVITY
0.15
*DENSITY
2.7e-06
*SPECIFIC HEAT
900.0
*SOLID SECTION, ELSET=E_Vol, MATERIAL=Mat1
*SHELL SECTION, ELSET=E_Skin, MATERIAL=Mat1
1.0
*NSET, NSET=N_All
1, 2, 3, 4, 5, 6
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*INITIAL CONDITIONS, TYPE=TEMPERATURE
N_All, 300.0
*STEP
*HEAT TRANSFER, STEADY STATE
*BOUNDARY
1241, 11, 11, 300.0
1242, 11, 11, 300.0
1243, 11, 11, 300.0
1244, 11, 11, 300.0
1245, 11, 11, 300.0
1246, 11, 11, 300.0
1247, 11, 11, 300.0
1248, 11, 11, 300.0
1249, 11, 11, 300.0
1250, 11, 11, 300.0
1251, 11, 11, 300.0
1252, 11, 11, 300.0
1253, 11, 11, 300.0
1254, 11, 11, 300.0
1255, 11, 11, 300.0
1256, 11, 11, 300.0
1257, 11, 11, 300.0
1258, 11, 11, 300.0
1259, 11, 11, 300.0
1260, 11, 11, 300.0
1261, 11, 11, 300.0
1262, 11, 11, 300.0
1263, 11, 11, 300.0
1264, 11, 11, 300.0
*DFLUX
E_Vol, BF, 0.001
*NODE PRINT, NSET=N_All, FREQUENCY=1
NT
*END STEP
